// SBML level 3 version 1

model main()
  // model units - substance: item, time: second, extent: item

  // Compartments:
  compartment c = 0.01 litre;

  // Species:
  species ADP in c = 10/c;
  species AMP in c = 10/c;
  species ATP in c = 1000/c;
  species FTHF10 in c = 10/c;
  species H in c = 10/c;
  species PI in c = 10/c;
  species PPI in c = 10/c;
  species THF in c = 10/c;
  species H2O in c = 1000/c;
  species ALA in c = 10/c;
  species ARG in c = 10/c;
  species ASN in c = 10/c;
  species ASP in c = 10/c;
  species CYS in c = 10/c;
  species GLU in c = 10/c;
  species GLN in c = 10/c;
  species GLY in c = 10/c;
  species HIS in c = 10/c;
  species ILE in c = 10/c;
  species LEU in c = 10/c;
  species LYS in c = 10/c;
  species MET in c = 10/c;
  species PHE in c = 10/c;
  species PRO in c = 10/c;
  species SER in c = 10/c;
  species THR in c = 10/c;
  species TRP in c = 10/c;
  species TYR in c = 10/c;
  species VAL in c = 10/c;
  species MG471 in c = 10/c;
  species aminoacylated_MG471 in c = 10/c;
  species MG492 in c = 10/c;
  species aminoacylated_MG492 in c = 10/c;
  species MG495 in c = 10/c;
  species aminoacylated_MG495 in c = 10/c;
  species MG497 in c = 10/c;
  species aminoacylated_MG497 in c = 10/c;
  species MG523 in c = 10/c;
  species aminoacylated_MG523 in c = 10/c;
  species MG514 in c = 10/c;
  species aminoacylated_MG514 in c = 10/c;
  species MG489 in c = 10/c;
  species aminoacylated_MG489 in c = 10/c;
  species MG483 in c = 10/c;
  species aminoacylated_MG483 in c = 10/c;
  species MG502 in c = 10/c;
  species GLU_aminoacylated_MG502 in c = 10/c;
  species aminoacylated_MG502 in c = 10/c;
  species MG513 in c = 10/c;
  species aminoacylated_MG513 in c = 10/c;
  species MG493 in c = 10/c;
  species aminoacylated_MG493 in c = 10/c;
  species MG499 in c = 10/c;
  species aminoacylated_MG499 in c = 10/c;
  species MG518 in c = 10/c;
  species aminoacylated_MG518 in c = 10/c;
  species MG472 in c = 10/c;
  species aminoacylated_MG472 in c = 10/c;
  species MG486 in c = 10/c;
  species aminoacylated_MG486 in c = 10/c;
  species MG500 in c = 10/c;
  species aminoacylated_MG500 in c = 10/c;
  species MG508 in c = 10/c;
  species aminoacylated_MG508 in c = 10/c;
  species MG519 in c = 10/c;
  species aminoacylated_MG519 in c = 10/c;
  species MG520 in c = 10/c;
  species aminoacylated_MG520 in c = 10/c;
  species MG501 in c = 10/c;
  species aminoacylated_MG501 in c = 10/c;
  species MG509 in c = 10/c;
  species aminoacylated_MG509 in c = 10/c;
  species MG485 in c = 10/c;
  species aminoacylated_MG485 in c = 10/c;
  species MG488 in c = 10/c;
  species met_aminoacylated_MG488 in c = 10/c;
  species aminoacylated_MG488 in c = 1/c;
  species MG490 in c = 10/c;
  species aminoacylated_MG490 in c = 10/c;
  species MG484 in c = 10/c;
  species aminoacylated_MG484 in c = 10/c;
  species MG475 in c = 10/c;
  species aminoacylated_MG475 in c = 10/c;
  species MG487 in c = 10/c;
  species aminoacylated_MG487 in c = 10/c;
  species MG506 in c = 10/c;
  species aminoacylated_MG506 in c = 10/c;
  species MG507 in c = 10/c;
  species aminoacylated_MG507 in c = 10/c;
  species MG479 in c = 10/c;
  species aminoacylated_MG479 in c = 10/c;
  species MG510 in c = 10/c;
  species aminoacylated_MG510 in c = 10/c;
  species MG512 in c = 10/c;
  species aminoacylated_MG512 in c = 10/c;
  species MG496 in c = 10/c;
  species aminoacylated_MG496 in c = 10/c;
  species MG504 in c = 10/c;
  species aminoacylated_MG504 in c = 10/c;
  species MG503 in c = 10/c;
  species aminoacylated_MG503 in c = 10/c;
  species MG511 in c = 10/c;
  species aminoacylated_MG511 in c = 10/c;
  species MG_0004 in c = 10/c;
  species aminoacylated_MG_0004 in c = 10/c;
  species MG_292_TETRAMER in c = 10/c;
  species MG_378_MONOMER in c = 10/c;
  species MG_113_DIMER in c = 10/c;
  species MG_036_DIMER in c = 10/c;
  species MG_253_MONOMER in c = 10/c;
  species MG_098_099_100_TRIMER in c = 10/c;
  species MG_462_MONOMER in c = 10/c;
  species MG_251_DIMER in c = 10/c;
  species MG_035_DIMER in c = 10/c;
  species MG_345_MONOMER in c = 10/c;
  species MG_266_MONOMER in c = 10/c;
  species MG_136_DIMER in c = 10/c;
  species MG_021_DIMER in c = 10/c;
  species MG_365_MONOMER in c = 10/c;
  species MG_194_195_TETRAMER in c = 10/c;
  species MG_283_DIMER in c = 10/c;
  species MG_005_DIMER in c = 10/c;
  species MG_375_DIMER in c = 10/c;
  species MG_126_DIMER in c = 10/c;
  species MG_455_DIMER in c = 10/c;
  species MG_334_MONOMER in c = 10/c;

  // Parameters:
  k_mg471_aminoacylation = 456 per_minute;
  k_mg472_aminoacylation = 255.762 per_minute;
  k_mg475_aminoacylation = 456 per_minute;
  k_mg479_aminoacylation = 5400 per_minute;
  k_mg483_aminoacylation = 8514 per_minute;
  k_mg484_aminoacylation = 840 per_minute;
  k_mg485_aminoacylation = 192 per_minute;
  k_mg486_aminoacylation = 255.762 per_minute;
  k_mg487_aminoacylation = 456 per_minute;
  k_mg488_aminoacylation = 192 per_minute;
  k_mg488_formyltransferase = 456 per_minute;
  k_mg489_aminoacylation = 456 per_minute;
  k_mg490_aminoacylation = 324 per_minute;
  k_mg492_aminoacylation = 168 per_minute;
  k_mg493_aminoacylation = 456 per_minute;
  k_mg495_aminoacylation = 168 per_minute;
  k_mg496_aminoacylation = 456 per_minute;
  k_mg497_aminoacylation = 168 per_minute;
  k_mg499_aminoacylation = 456 per_minute;
  k_mg500_aminoacylation = 306 per_minute;
  k_mg501_aminoacylation = 456 per_minute;
  k_mg502_aminoacylation = 264 per_minute;
  k_mg502_amidotransferase = 57.6 per_minute;
  k_mg503_aminoacylation = 44.4 per_minute;
  k_mg504_aminoacylation = 456 per_minute;
  k_mg506_aminoacylation = 456 per_minute;
  k_mg507_aminoacylation = 456 per_minute;
  k_mg508_aminoacylation = 306 per_minute;
  k_mg509_aminoacylation = 456 per_minute;
  k_mg510_aminoacylation = 5400 per_minute;
  k_mg511_aminoacylation = 456 per_minute;
  k_mg512_aminoacylation = 5400 per_minute;
  k_mg513_aminoacylation = 264 per_minute;
  k_mg514_aminoacylation = 1620 per_minute;
  k_mg518_aminoacylation = 8520 per_minute;
  k_mg519_aminoacylation = 306 per_minute;
  k_mg520_aminoacylation = 306 per_minute;
  k_mg523_aminoacylation = 168 per_minute;
  k_mg_0004_aminoacylation = 456 per_minute;

  // Reactions:
  MG471_Aminoacylation: ALA + ATP + MG471 => AMP + PPI + aminoacylated_MG471; k_mg471_aminoacylation*MG_292_TETRAMER*MG471*ALA*ATP;  // modifiers: MG_292_TETRAMER
  MG472_Aminoacylation: ILE + ATP + MG472 => AMP + PPI + aminoacylated_MG472; k_mg472_aminoacylation*MG_345_MONOMER*MG472*ILE*ATP;  // modifiers: MG_345_MONOMER
  MG475_Aminoacylation: SER + ATP + MG475 => AMP + PPI + aminoacylated_MG475; k_mg475_aminoacylation*MG_005_DIMER*MG475*SER*ATP;  // modifiers: MG_005_DIMER
  MG479_Aminoacylation: THR + ATP + MG479 => AMP + PPI + aminoacylated_MG479; k_mg479_aminoacylation*MG_375_DIMER*MG479*THR*ATP;  // modifiers: MG_375_DIMER
  MG483_Aminoacylation: CYS + ATP + MG483 => AMP + PPI + aminoacylated_MG483; k_mg483_aminoacylation*MG_253_MONOMER*MG483*CYS*ATP;  // modifiers: MG_253_MONOMER
  MG484_Aminoacylation: PRO + ATP + MG484 => AMP + PPI + aminoacylated_MG484; k_mg484_aminoacylation*MG_283_DIMER*MG484*PRO*ATP;  // modifiers: MG_283_DIMER
  MG485_Aminoacylation: MET + ATP + MG485 => AMP + PPI + aminoacylated_MG485; k_mg485_aminoacylation*MG_021_DIMER*MG485*MET*ATP;  // modifiers: MG_021_DIMER
  MG486_Aminoacylation: ILE + ATP + MG486 => AMP + PPI + aminoacylated_MG486; k_mg486_aminoacylation*MG_345_MONOMER*MG486*ILE*ATP;  // modifiers: MG_345_MONOMER
  MG487_Aminoacylation: SER + ATP + MG487 => AMP + PPI + aminoacylated_MG487; k_mg487_aminoacylation*MG_005_DIMER*MG487*SER*ATP;  // modifiers: MG_005_DIMER
  MG488_Aminoacylation: MET + ATP + MG488 => AMP + PPI + met_aminoacylated_MG488; k_mg488_aminoacylation*MG_021_DIMER*MG488*MET*ATP;  // modifiers: MG_021_DIMER
  MG488_Formyltransferase: met_aminoacylated_MG488 + FTHF10 + H2O => THF + aminoacylated_MG488; k_mg488_formyltransferase*MG_365_MONOMER*met_aminoacylated_MG488*H2O*FTHF10;  // modifiers: MG_365_MONOMER
  MG489_Aminoacylation: ASP + ATP + MG489 => AMP + PPI + aminoacylated_MG489; k_mg489_aminoacylation*MG_036_DIMER*MG489*ASP*ATP;  // modifiers: MG_036_DIMER
  MG490_Aminoacylation: PHE + ATP + MG490 => AMP + PPI + aminoacylated_MG490; k_mg490_aminoacylation*MG_194_195_TETRAMER*MG490*PHE*ATP;  // modifiers: MG_194_195_TETRAMER
  MG492_Aminoacylation: ARG + ATP + MG492 => AMP + PPI + aminoacylated_MG492; k_mg492_aminoacylation*MG_378_MONOMER*MG492*ARG*ATP;  // modifiers: MG_378_MONOMER
  MG493_Aminoacylation: GLY + ATP + MG493 => AMP + PPI + aminoacylated_MG493; k_mg493_aminoacylation*MG_251_DIMER*MG493*GLY*ATP;  // modifiers: MG_251_DIMER
  MG495_Aminoacylation: ARG + ATP + MG495 => AMP + PPI + aminoacylated_MG495; k_mg495_aminoacylation*MG_378_MONOMER*MG495*ARG*ATP;  // modifiers: MG_378_MONOMER
  MG496_Aminoacylation: TRP + ATP + MG496 => AMP + PPI + aminoacylated_MG496; k_mg496_aminoacylation*MG_126_DIMER*MG496*TRP*ATP;  // modifiers: MG_126_DIMER
  MG497_Aminoacylation: ARG + ATP + MG497 => AMP + PPI + aminoacylated_MG497; k_mg497_aminoacylation*MG_378_MONOMER*MG497*ARG*ATP;  // modifiers: MG_378_MONOMER
  MG499_Aminoacylation: GLY + ATP + MG499 => AMP + PPI + aminoacylated_MG499; k_mg499_aminoacylation*MG_251_DIMER*MG499*GLY*ATP;  // modifiers: MG_251_DIMER
  MG500_Aminoacylation: LEU + ATP + MG500 => AMP + PPI + aminoacylated_MG500; k_mg500_aminoacylation*MG_266_MONOMER*MG500*LEU*ATP;  // modifiers: MG_266_MONOMER
  MG501_Aminoacylation: LYS + ATP + MG501 => AMP + PPI + aminoacylated_MG501; k_mg501_aminoacylation*MG_136_DIMER*MG501*LYS*ATP;  // modifiers: MG_136_DIMER
  MG502_Aminoacylation: GLU + ATP + MG502 => AMP + PPI + GLU_aminoacylated_MG502; k_mg502_aminoacylation*MG_462_MONOMER*MG502*GLU*ATP;  // modifiers: MG_462_MONOMER
  MG502_Amidotransferase: GLU_aminoacylated_MG502 + ATP + GLN + H2O => ADP + PI + GLU + H + aminoacylated_MG502; k_mg502_amidotransferase*MG_098_099_100_TRIMER*GLU_aminoacylated_MG502*GLN*ATP*H2O;  // modifiers: MG_098_099_100_TRIMER
  MG503_Aminoacylation: TYR + ATP + MG503 => AMP + PPI + aminoacylated_MG503; k_mg503_aminoacylation*MG_455_DIMER*MG503*TYR*ATP;  // modifiers: MG_455_DIMER
  MG504_Aminoacylation: TRP + ATP + MG504 => AMP + PPI + aminoacylated_MG504; k_mg504_aminoacylation*MG_126_DIMER*MG504*TRP*ATP;  // modifiers: MG_126_DIMER
  MG506_Aminoacylation: SER + ATP + MG506 => AMP + PPI + aminoacylated_MG506; k_mg506_aminoacylation*MG_005_DIMER*MG506*SER*ATP;  // modifiers: MG_005_DIMER
  MG507_Aminoacylation: SER + ATP + MG507 => AMP + PPI + aminoacylated_MG507; k_mg507_aminoacylation*MG_005_DIMER*MG507*SER*ATP;  // modifiers: MG_005_DIMER
  MG508_Aminoacylation: LEU + ATP + MG508 => AMP + PPI + aminoacylated_MG508; k_mg508_aminoacylation*MG_266_MONOMER*MG508*LEU*ATP;  // modifiers: MG_266_MONOMER
  MG509_Aminoacylation: LYS + ATP + MG509 => AMP + PPI + aminoacylated_MG509; k_mg509_aminoacylation*MG_136_DIMER*MG509*LYS*ATP;  // modifiers: MG_136_DIMER
  MG510_Aminoacylation: THR + ATP + MG510 => AMP + PPI + aminoacylated_MG510; k_mg510_aminoacylation*MG_375_DIMER*MG510*THR*ATP;  // modifiers: MG_375_DIMER
  MG511_Aminoacylation: VAL + ATP + MG511 => AMP + PPI + aminoacylated_MG511; k_mg511_aminoacylation*MG_334_MONOMER*MG511*VAL*ATP;  // modifiers: MG_334_MONOMER
  MG512_Aminoacylation: THR + ATP + MG512 => AMP + PPI + aminoacylated_MG512; k_mg512_aminoacylation*MG_375_DIMER*MG512*THR*ATP;  // modifiers: MG_375_DIMER
  MG513_Aminoacylation: GLU + ATP + MG513 => AMP + PPI + aminoacylated_MG513; k_mg513_aminoacylation*MG_462_MONOMER*MG513*GLU*ATP;  // modifiers: MG_462_MONOMER
  MG514_Aminoacylation: ASN + ATP + MG514 => AMP + PPI + aminoacylated_MG514; k_mg514_aminoacylation*MG_113_DIMER*MG514*ASN*ATP;  // modifiers: MG_113_DIMER
  MG518_Aminoacylation: HIS + ATP + MG518 => AMP + PPI + aminoacylated_MG518; k_mg518_aminoacylation*MG_035_DIMER*MG518*HIS*ATP;  // modifiers: MG_035_DIMER
  MG519_Aminoacylation: LEU + ATP + MG519 => AMP + PPI + aminoacylated_MG519; k_mg519_aminoacylation*MG_266_MONOMER*MG519*LEU*ATP;  // modifiers: MG_266_MONOMER
  MG520_Aminoacylation: LEU + ATP + MG520 => AMP + PPI + aminoacylated_MG520; k_mg520_aminoacylation*MG_266_MONOMER*MG520*LEU*ATP;  // modifiers: MG_266_MONOMER
  MG523_Aminoacylation: ARG + ATP + MG523 => AMP + PPI + aminoacylated_MG523; k_mg523_aminoacylation*MG_378_MONOMER*MG523*ARG*ATP;  // modifiers: MG_378_MONOMER
  MG_0004_Aminoacylation: ALA + ATP + MG_0004 => AMP + PPI + aminoacylated_MG_0004; k_mg_0004_aminoacylation*MG_292_TETRAMER*MG_0004*ALA*ATP;  // modifiers: MG_292_TETRAMER

  // Unit definitions:
  unit per_second = 1 / second;
  unit per_minute = 1 / (60 second);
end
